// COMSOL Multiphysics 6.4.0.429 model "Luneburg Lens --  Maxwell fisheye lens.mph"
// Outline of the model tree

Parameters
  R = 0.1[m]  // rad of lens

Variables
  var1 "Variables 1"
    radialPos = sqrt(x^2+y^2+z^2)/R
    refrInd = 2 / (1 + (sqrt(x^2 + y^2 + z^2)/R)^2)

Geometry
  geom1 "Geometry 1" (3D, length unit m)
    sph1: Sphere | r = R
    blk1: Block | size = {2*R, 2*R, 1*R+0.01}; base = center; pos = {0, 0, 0.055}
    dif1: Difference | input = sph1; input2 = blk1
    fin: Finalize "Form Union"
  pgeom_gop "Geometry" (1D, length unit m)
    pt1: Point

Materials
  mat1: Common "Material 1" on all domains
    RefractiveIndex: RefractiveIndex
      n = refrInd
      ki = 0

Physics
  gop: GeometricalOptics on all domains
    dependent variable q = {qx, qy, qz}
    mp1: MediumProperties (default)
    matd1: MaterialDiscontinuity (default) | ReleaseReflectedRays = Never
    op1: RayProperties | RayPropertySpecification = SpecifyVacuumWavelength; nu = 4.54e14[Hz]; lambda0 = 660[nm]; mp = 1
    rpt1: ReleaseFromPoint on points 3 | RayDirectionVector = Hemispherical; L0 = {0, 0, 1}; rax = {0, 0, 1}

Mesh
  mesh1 "Mesh 1" (physics-controlled)
    size: MeshSizeDefault | hauto = 4

Studies
  std1 "Study 1"
    rtrac: RayTracing | timestepspec = specifylength; tlist = range(0,0.01,0.4); llist = range(0,0.01,0.4)

Solver configurations
  sol1 "Solution 1" (study std1)
    v1: Variables "Dependent Variables 1"
    t1: Time "Time-Dependent Solver 1"
      fc1: FullyCoupled
      i1: Iterative
        ja1: Jacobi

Datasets
  dset1: Solution | solution = sol1
  ray1: Ray
    solution = sol1
    rgeomspec = fromphysics
    rgeom = pgeom_gop
    posdof = {comp1.qx, comp1.qy, comp1.qz}
    physicsinterface = gop

Plots
  pg1: PlotGroup3D "Ray Trajectories (gop)" | data = ray1
    rtrj1: RayTrajectories
      col1: Color "Color Expression 1" | expr = t
      filt1: RayTrajectoriesFilter "Filter 1"